<?xml version="1.0"?>
<?xml-stylesheet type="text/xsl" href="http://jsbsim.sourceforge.net/JSBSim.xsl"?>

<fdm_config name="AV-8B" version="2.0" release="ALPHA"
   xmlns:xsi="http://www.w3.org/2001/XMLSchema-instance"
   xsi:noNamespaceSchemaLocation="http://jsbsim.sourceforge.net/JSBSim.xsd">

 <fileheader>
  <author> Aeromatic v 3.3.10 </author>
  <filecreationdate> 20 Nov 2017 </filecreationdate>
  <version>$Revision: 1.79 $</version>
  <description> Models a AV-8B. </description>
 </fileheader>

<!--
  File:     AV-8B.xml
  Inputs:
    name:          AV-8B
    type:          Single engine Fighter Jet
    stall speed:   91.79kts
    max weight:    31004.50 lb
    length:        46.33 ft
    wing:
     span:         30.33 ft
     area:         230.00 sq-ft
     mean chord:   8.75 ft
     aspect ratio: 4.00:1
     taper ratio:  0.25:1
     incidence:    3.00 degrees
     dihedral:     -11.00 degrees
     sweep:        30.62 degrees

    no. engines:   1
    engine type:   Turbine Engine
    engine layout: aft fuselage

    control type:   Conventional Controls

    gear type:     tricycle
    steering type: steering
    retractable?:  yes

  Outputs:
    wing loading:       134.80 lb/sq-ft
     - thickness ratio: 3.57%
    payload:            12002.08 lbs
    CL-alpha:           1.08 per radian
    CL-0:               0.99
    CL-max:             4.73
    CD-0:               0.01
    K:                  0.12
    Mcrit:              0.81

    min. turn radius    411.85 ft
    max. turn rate:     0.41 deg/s
-->

 <metrics>
   <wingarea  unit="FT2">   230.00 </wingarea>
   <wingspan  unit="FT" >    30.33 </wingspan>
   <wing_incidence unit="DEG"> 3.00 </wing_incidence>
   <chord     unit="FT" >     8.75 </chord>
   <htailarea unit="FT2">    48.55 </htailarea>
   <htailarm  unit="FT" >    18.53 </htailarm>
   <vtailarea  unit="FT2">   32.29 </vtailarea>
   <vtailarm  unit="FT" >    18.53 </vtailarm>
   <location name="AERORP" unit="M">
     <x>    -0.22 </x>
     <y>     0.00 </y>
     <z>     0.75 </z>
   </location>
   <location name="EYEPOINT" unit="IN">
     <x>   111.19 </x>
     <y>     0.00 </y>
     <z>    36.00 </z>
   </location>
   <location name="VRP" unit="IN">
     <x>     0.0 </x>
     <y>     0.0 </y>
     <z>     0.0 </z>
   </location>
 </metrics>

 <mass_balance>
   <ixx unit="SLUG*FT2">   7279.36 </ixx>
   <iyy unit="SLUG*FT2">  38537.71 </iyy>
   <izz unit="SLUG*FT2">  25514.13 </izz>
   <emptywt unit="LBS" >  13979.70 </emptywt>
   <location name="CG" unit="M">
     <x>  -0.32 </x>
     <y>   0.00 </y>
     <z>   0.50 </z>
   </location>

   <pointmass name="station1">
    <description> Left Outbooard </description>
    <weight unit="LBS"> 0.0 </weight>
    <location name="POINTMASS" unit="M">
     <x> 0.76539</x>
     <y>-3.98336</y>
     <z> 0.09917</z>
   </location>
  </pointmass>

  <pointmass name="station2">
    <description> Left Middle </description>
    <weight unit="LBS"> 0.0 </weight>
    <location name="POINTMASS" unit="M">
     <x> 0.33038</x>
     <y>-3.26933</y>
     <z> 0.12784</z>
   </location>
  </pointmass>

  <pointmass name="station3">
    <description> Left Inboard </description>
    <weight unit="LBS"> 0.0 </weight>
    <location name="POINTMASS" unit="M">
     <x>-0.09229</x>
     <y>-1.92335</y>
     <z> 0.22196</z>
   </location>
  </pointmass>

  <pointmass name="station4">
    <description> Center </description>
    <weight unit="LBS"> 0.0 </weight>
    <location name="POINTMASS" unit="M">
     <x>-0.77166</x>
     <y> 0.00000</y>
     <z>-0.22959</z>
   </location>
  </pointmass>

  <pointmass name="station5">
    <description> Right Inboard </description>
    <weight unit="LBS"> 0.0 </weight>
    <location name="POINTMASS" unit="M">
     <x>-0.09229</x>
     <y> 1.92335</y>
     <z> 0.22196</z>
   </location>
  </pointmass>

  <pointmass name="station6">
    <description> Right Middle </description>
    <weight unit="LBS"> 0.0 </weight>
    <location name="POINTMASS" unit="M">
     <x> 0.33038</x>
     <y> 3.26933</y>
     <z> 0.12784</z>
   </location>
  </pointmass>

  <pointmass name="station7">
    <description> Right Outbooard </description>
    <weight unit="LBS"> 0.0 </weight>
    <location name="POINTMASS" unit="M">
     <x> 0.76539</x>
     <y> 3.98336</y>
     <z> 0.09917</z>
   </location>
  </pointmass>

  <pointmass name="station8">
    <description> Left Sidewinder </description>
    <weight unit="LBS"> 0.0 </weight>
    <location name="POINTMASS" unit="M">
     <x>-0.09229</x>
     <y>-2.59224</y>
     <z> 0.26600</z>
   </location>
  </pointmass>

  <pointmass name="station9">
    <description> Right Sidewinder </description>
    <weight unit="LBS"> 0.0 </weight>
    <location name="POINTMASS" unit="M">
     <x>-0.09229</x>
     <y> 2.59224</y>
     <z> 0.26600</z>
   </location>
  </pointmass>

 </mass_balance>

 <propulsion>

   <engine file="F402-RR-408">
    <location unit="M">
      <x>   -1.7 </x>
      <y>     0.00 </y>
      <z>     0.485 </z>
    </location>
    <orient unit="DEG">
      <pitch>     0.00 </pitch>
       <roll>     0.00 </roll>
        <yaw>     0.00 </yaw>
    </orient>
    <feed> 0 </feed>
    <feed> 1 </feed>
    <feed> 2 </feed>
    <feed> 3 </feed>
    <feed> 4 </feed>
    <feed> 5 </feed>
    <feed> 6 </feed>
    <feed> 7 </feed>
    <feed> 8 </feed>
    <feed> 9 </feed>
    <feed> 10 </feed>
    <feed> 11 </feed>

    <thruster file="direct">
     <sense> 1 </sense>
     <location unit="M">
       <x>     -0.2 </x>
       <y>     0.00 </y>
       <z>     0.485 </z>
     </location>
     <orient unit="DEG">
       <pitch>     0.00 </pitch>
        <roll>     0.00 </roll>
         <yaw>     0.00 </yaw>
     </orient>
    </thruster>
  </engine>

  <!--
  fuel tank reference:
  0 - left wing
  1 - right wing
  2 - front left
  3 - front right
  4 - left center feed
  5 - right center feed
  6 - rear
  7 - accumulator
  8 - left middle drop
  9 - left inside drop
  10 - right inside drop
  11 - right middle drop
-->

  <!-- left wing tank -->
  <tank type="FUEL">
     <location unit="M">
       <x>   -0.04490 </x>
       <y>   -1.46810 </y>
       <z>    1.03963 </z>
     </location>
     <capacity unit="LBS"> 2468.4 </capacity>
     <contents unit="LBS"> 2468.4 </contents>
     <priority>3</priority>
  </tank>

  <!-- right wing tank -->
  <tank type="FUEL">
     <location unit="M">
       <x>   -0.04490 </x>
       <y>    1.46810 </y>
       <z>    1.03963 </z>
     </location>
     <capacity unit="LBS"> 2468.4 </capacity>
     <contents unit="LBS"> 2468.4 </contents>
     <priority>3</priority>
  </tank>

  <!-- front left tank -->
  <tank type="FUEL">
     <location unit="M">
       <x>   -1.66143 </x>
       <y>   -0.61792 </y>
       <z>    0.58048 </z>
     </location>
     <capacity unit="LBS"> 531.30 </capacity>
     <contents unit="LBS"> 531.30 </contents>
     <priority>4</priority>
  </tank>

  <!-- front right tank -->
  <tank type="FUEL">
     <location unit="M">
       <x>   -1.66143 </x>
       <y>    0.61792 </y>
       <z>    0.58048 </z>
     </location>
     <capacity unit="LBS"> 531.30 </capacity>
     <contents unit="LBS"> 531.30 </contents>
     <priority>4</priority>
  </tank>

  <!-- left center feed tank -->
  <tank type="FUEL">
     <location unit="M">
       <x>   -0.69947 </x>
       <y>   -0.54290 </y>
       <z>    0.18933 </z>
     </location>
     <capacity unit="LBS"> 310.20 </capacity>
     <contents unit="LBS"> 310.20 </contents>
     <priority>5</priority>
  </tank>

  <!-- right center feed tank -->
  <tank type="FUEL">
     <location unit="M">
       <x>   -0.69947 </x>
       <y>    0.54290 </y>
       <z>    0.18933 </z>
     </location>
     <capacity unit="LBS"> 310.20 </capacity>
     <contents unit="LBS"> 310.20 </contents>
     <priority>5</priority>
  </tank>

  <!-- rear tank -->
  <tank type="FUEL">
     <location unit="M">
       <x>    1.75307 </x>
       <y>    0.00000 </y>
       <z>    1.21878 </z>
     </location>
     <capacity unit="LBS"> 1062.6 </capacity>
     <contents unit="LBS"> 1062.6 </contents>
     <priority>5</priority>
  </tank>

  <!-- accumulator -->
  <tank type="FUEL">
     <location unit="M">
       <x>   -0.69947 </x>
       <y>    0.00000 </y>
       <z>    0.18933 </z>
     </location>
     <capacity unit="LBS"> 10.0 </capacity>
     <contents unit="LBS"> 10.0 </contents>
     <priority>6</priority>
  </tank>

  <!-- for the external tanks, 300 gals is 1980 lbs -->

  <!-- left middle drop tank -->
  <tank type="FUEL">
     <location unit="M">
       <x>    0.79884 </x>
       <y>   -3.26907 </y>
       <z>   -0.19803 </z>
     </location>
     <capacity unit="LBS"> 1980.0 </capacity>
     <contents unit="LBS"> 0.0 </contents>
     <priority>1</priority>
  </tank>

  <!-- left inside drop tank -->
  <tank type="FUEL">
     <location unit="M">
       <x>    0.25856 </x>
       <y>   -1.92386 </y>
       <z>   -0.10093 </z>
     </location>
     <capacity unit="LBS"> 1980.0 </capacity>
     <contents unit="LBS"> 0.0 </contents>
     <priority>2</priority>
  </tank>

  <!-- right inside drop tank -->
  <tank type="FUEL">
     <location unit="M">
       <x>    0.25856 </x>
       <y>    1.92386 </y>
       <z>   -0.10093 </z>
     </location>
     <capacity unit="LBS"> 1980.0 </capacity>
     <contents unit="LBS"> 0.0 </contents>
     <priority>2</priority>
  </tank>

  <!-- right middle drop tank -->
  <tank type="FUEL">
     <location unit="M">
       <x>    0.79884 </x>
       <y>    3.26907 </y>
       <z>   -0.19803 </z>
     </location>
     <capacity unit="LBS"> 1980.0 </capacity>
     <contents unit="LBS"> 0.0 </contents>
     <priority>1</priority>
  </tank>

 </propulsion>

 <ground_reactions>

  <contact type="BOGEY" name="FORE">
    <location unit="M">
      <x>    -2.56772 </x>
      <y>     0.00 </y>
      <z>   -1.53999 </z>
    </location>
    <static_friction>  0.80 </static_friction>
    <dynamic_friction> 0.70 </dynamic_friction>
    <rolling_friction> 0.02 </rolling_friction>
    <spring_coeff  unit="LBS/FT">     24004.35 </spring_coeff>
    <damping_coeff unit="LBS/FT/SEC"> 15502.68 </damping_coeff>
    <max_steer unit="DEG"> 20.00 </max_steer>
    <brake_group> LEFT </brake_group>
    <retractable> 1 </retractable>
  </contact>

  <contact type="BOGEY" name="AFT">
    <location unit="M">
      <x>    1.02659 </x>
      <y>     0.00 </y>
      <z>   -1.18956 </z>
    </location>
    <static_friction>  0.80 </static_friction>
    <dynamic_friction> 0.70 </dynamic_friction>
    <rolling_friction> 0.02 </rolling_friction>
    <spring_coeff  unit="LBS/FT">     20000.35 </spring_coeff>
    <damping_coeff unit="LBS/FT/SEC"> 5000.68 </damping_coeff>
    <max_steer unit="DEG"> 0.00 </max_steer>
    <brake_group> RIGHT </brake_group>
    <retractable> 1 </retractable>
  </contact>

  <contact type="BOGEY" name="LEFT_OUTBOARD">
    <location unit="M">
      <x>   1.76525 </x>
      <y>  -2.57263 </y>
      <z>  -1.03168 </z>
    </location>
    <static_friction>  0.80 </static_friction>
    <dynamic_friction> 0.70 </dynamic_friction>
    <rolling_friction> 0.02 </rolling_friction>
    <spring_coeff  unit="LBS/FT">     20000.50 </spring_coeff>
    <damping_coeff unit="LBS/FT/SEC"> 5000.25 </damping_coeff>
    <max_steer unit="DEG">0</max_steer>
    <brake_group> NONE </brake_group>
    <retractable> 1 </retractable>
  </contact>

  <contact type="BOGEY" name="RIGHT_OUTBOARD">
    <location unit="M">
      <x>   1.76525 </x>
      <y>   2.57263 </y>
      <z>  -1.03168 </z>
    </location>
    <static_friction>  0.80 </static_friction>
    <dynamic_friction> 0.70 </dynamic_friction>
    <rolling_friction> 0.02 </rolling_friction>
    <spring_coeff  unit="LBS/FT">     20000.50 </spring_coeff>
    <damping_coeff unit="LBS/FT/SEC"> 5000.25 </damping_coeff>
    <max_steer unit="DEG">0</max_steer>
    <brake_group> NONE </brake_group>
    <retractable> 1 </retractable>
  </contact>

  <contact type="STRUCTURE" name="NOSE">
    <location unit="M">
     <x> -7.17586 </x>
     <y> 0.0 </y>
     <z> -0.07131 </z>
    </location>
      <static_friction> 5.0 </static_friction>
      <dynamic_friction> 4.0 </dynamic_friction>
      <spring_coeff unit="LBS/FT"> 10000 </spring_coeff>
      <damping_coeff unit="LBS/FT/SEC"> 2000 </damping_coeff>
      <damping_coeff_rebound unit="LBS/FT/SEC"> 25000 </damping_coeff_rebound>
 </contact>

 <contact type="STRUCTURE" name="CANOPY">
    <location unit="M">
     <x> -3.32944 </x>
     <y> 0.0 </y>
     <z> 1.51199 </z>
    </location>
      <static_friction> 5.0 </static_friction>
      <dynamic_friction> 4.0 </dynamic_friction>
      <spring_coeff unit="LBS/FT"> 10000 </spring_coeff>
      <damping_coeff unit="LBS/FT/SEC"> 2000 </damping_coeff>
      <damping_coeff_rebound unit="LBS/FT/SEC"> 25000 </damping_coeff_rebound>
 </contact>

 <contact type="STRUCTURE" name="VSTAB">
    <location unit="M">
     <x> 6.11430 </x>
     <y> 0.0 </y>
     <z> 3.2065 </z>
    </location>
      <static_friction> 5.0 </static_friction>
      <dynamic_friction> 4.0 </dynamic_friction>
      <spring_coeff unit="LBS/FT"> 10000 </spring_coeff>
      <damping_coeff unit="LBS/FT/SEC"> 2000 </damping_coeff>
      <damping_coeff_rebound unit="LBS/FT/SEC"> 25000 </damping_coeff_rebound>
 </contact>

 <contact type="STRUCTURE" name="REARDOME">
    <location unit="M">
     <x> 7.15513 </x>
     <y> 0.0 </y>
     <z> 1.23088 </z>
    </location>
      <static_friction> 5.0 </static_friction>
      <dynamic_friction> 4.0 </dynamic_friction>
      <spring_coeff unit="LBS/FT"> 10000 </spring_coeff>
      <damping_coeff unit="LBS/FT/SEC"> 2000 </damping_coeff>
      <damping_coeff_rebound unit="LBS/FT/SEC"> 25000 </damping_coeff_rebound>
 </contact>

 <contact type="STRUCTURE" name="FIN">
    <location unit="M">
     <x> 5.74485 </x>
     <y> 0.0 </y>
     <z> 0.0744 </z>
    </location>
      <static_friction> 5.0 </static_friction>
      <dynamic_friction> 4.0 </dynamic_friction>
      <spring_coeff unit="LBS/FT"> 10000 </spring_coeff>
      <damping_coeff unit="LBS/FT/SEC"> 2000 </damping_coeff>
      <damping_coeff_rebound unit="LBS/FT/SEC"> 25000 </damping_coeff_rebound>
 </contact>

 <contact type="STRUCTURE" name="RHSTAB">
    <location unit="M">
     <x> 6.55149 </x>
     <y> 2.14685 </y>
     <z> 0.75465 </z>
    </location>
      <static_friction> 5.0 </static_friction>
      <dynamic_friction> 4.0 </dynamic_friction>
      <spring_coeff unit="LBS/FT"> 10000 </spring_coeff>
      <damping_coeff unit="LBS/FT/SEC"> 2000 </damping_coeff>
      <damping_coeff_rebound unit="LBS/FT/SEC"> 25000 </damping_coeff_rebound>
 </contact>

 <contact type="STRUCTURE" name="LHSTAB">
    <location unit="M">
     <x> 6.55149 </x>
     <y> -2.14685 </y>
     <z> 0.75465 </z>
    </location>
      <static_friction> 5.0 </static_friction>
      <dynamic_friction> 4.0 </dynamic_friction>
      <spring_coeff unit="LBS/FT"> 10000 </spring_coeff>
      <damping_coeff unit="LBS/FT/SEC"> 2000 </damping_coeff>
      <damping_coeff_rebound unit="LBS/FT/SEC"> 25000 </damping_coeff_rebound>
 </contact>

 <contact type="STRUCTURE" name="RWING">
    <location unit="M">
     <x> 1.99859 </x>
     <y> 4.6023 </y>
     <z> 0.24470 </z>
    </location>
      <static_friction> 5.0 </static_friction>
      <dynamic_friction> 4.0 </dynamic_friction>
      <spring_coeff unit="LBS/FT"> 10000 </spring_coeff>
      <damping_coeff unit="LBS/FT/SEC"> 2000 </damping_coeff>
      <damping_coeff_rebound unit="LBS/FT/SEC"> 25000 </damping_coeff_rebound>
 </contact>

 <contact type="STRUCTURE" name="LWING">
    <location unit="M">
     <x> 1.99859 </x>
     <y> -4.6023 </y>
     <z> 0.24470 </z>
    </location>
      <static_friction> 5.0 </static_friction>
      <dynamic_friction> 4.0 </dynamic_friction>
      <spring_coeff unit="LBS/FT"> 10000 </spring_coeff>
      <damping_coeff unit="LBS/FT/SEC"> 2000 </damping_coeff>
      <damping_coeff_rebound unit="LBS/FT/SEC"> 25000 </damping_coeff_rebound>
 </contact>

 </ground_reactions>

 <system file="Aircraft control.xml"/>
 <system file="Landing Gear.xml"/>
 <system file="Flaps.xml"/>
 <system file="Speedbrake.xml"/>
 <system file="nozzle_control.xml"/>

 <flight_control name="FCS: AV-8B">

 </flight_control>

 <aerodynamics>

  <function name="aero/Vj">
    <description>Jet Velocity Ratio</description>
    <pow>
      <quotient>
        <product>
          <value>13</value>
          <property>aero/qbarUW-psf</property>
        </product>
        <max>
          <property>propulsion/engine[0]/thrust-lbs</property>
          <value>1</value>
        </max>
      </quotient>
      <value>0.5</value>
    </pow>
  </function>

  <function name="aero/k">
    <description>Not sure but NASA thought it was important</description>
    <quotient>
      <difference>
        <property>aero/Vj</property>
        <value>0.05</value>
      </difference>
      <value>0.05</value>
    </quotient>
  </function>

  <function name="aero/alpha-rad-corr">
    <description>Alpha corrected with Vj</description>
      <!--if vj greater than or equal to 0.1 then alpha = alpha
      if vj is between 0.05 and 0.1 then alpha = pitch + (alpha - pitch) * k
      if vj less than or equal to 0.05 then alpha = pitch-->
    <ifthen>
      <ge>
        <property>aero/Vj</property>
        <value>0.1</value>
      </ge>
      <property>aero/alpha-rad</property>
      <ifthen>
        <le>
          <property>aero/Vj</property>
          <value>0.05</value>
        </le>
        <property>attitude/pitch-rad</property>
        <sum>
          <property>attitude/pitch-rad</property>
          <product>
            <difference>
              <property>aero/alpha-rad</property>
              <property>attitude/pitch-rad</property>
            </difference>
            <property>aero/k</property>
          </product>
        </sum>
      </ifthen>
    </ifthen>
  </function>

  <function name="aero/alpha-20">
    <description>alpha-corr divided by 20</description>
    <quotient>
      <todegrees>
        <property>aero/alpha-rad-corr</property>
      </todegrees>
      <value>20</value>
    </quotient>
  </function>

  <function name="aero/beta-deg1">
    <description></description>
    <todegrees>
      <property>aero/beta-rad</property>
    </todegrees>
  </function>


  <axis name="LIFT">

    <!-- Lift above 0.85 and below -0.85 is generalised -->
    <!-- -5 to 25 degrees from https://ntrs.nasa.gov/archive/nasa/casi.ntrs.nasa.gov/19880003981.pdf -->
    <function name="aero/force/Lift_alpha">
      <description>Lift due to alpha</description>
      <product>
          <property>aero/qbar-psf</property>
          <property>metrics/Sw-sqft</property>
          <sum>
            <product>
              <value>-0.456</value>
              <pow>
                <property>aero/alpha-20</property>
                <value>3</value>
              </pow>
            </product>
            <product>
              <value>0.307</value>
              <pow>
                <property>aero/alpha-20</property>
                <value>2</value>
              </pow>
            </product>
            <product>
              <value>1.465</value>
              <property>aero/alpha-20</property>
            </product>
          </sum>
          <property>tune/lift/alpha</property>
      </product>
    </function>

    <function name="aero/force/Lift_pitch_rate">
        <description>Lift due to pitch rate</description>
        <product>
          <property>aero/qbar-psf</property>
          <property>metrics/Sw-sqft</property>
          <property>velocities/q-aero-rad_sec</property>
          <property>aero/ci2vel</property>
          <value> 3.6243 </value>
          <property>tune/lift/pitch_rate</property>
        </product>
      </function>

      <function name="aero/force/Lift_alpha_rate">
        <description>Lift due to alpha rate</description>
        <product>
           <property>aero/qbar-psf</property>
           <property>metrics/Sw-sqft</property>
           <property>aero/alphadot-rad_sec</property>
           <property>aero/ci2vel</property>
           <value> 2.4166 </value>
           <property>tune/lift/alpha_rate</property>
        </product>
      </function>

    <function name="aero/force/Lift_elevator">
       <description>Lift due to Elevator Deflection</description>
       <product>
           <property>aero/qbar-psf</property>
           <property>metrics/Sw-sqft</property>
           <property>fcs/elevator-pos-rad</property>
           <value> 0.5661 </value>
           <property>tune/lift/elevator</property>
       </product>
    </function>

    <function name="aero/force/Lift_flap">
       <description>Delta Lift due to flaps</description>
       <product>
           <property>aero/qbar-psf</property>
           <property>metrics/Sw-sqft</property>
           <property>fcs/flap-pos-deg</property>
           <value> 0.0100 </value>
           <property>tune/lift/flap</property>
       </product>
    </function>

    <function name="aero/force/Lift_mach">
       <description>Lift due to mach</description>
        <product>
          <property>aero/qbar-psf</property>
          <property>metrics/Sw-sqft</property>
          <product>
            <value>0.179</value>
            <pow>
              <property>velocities/mach</property>
              <value>4</value>
            </pow>
          </product>
          <property>tune/lift/mach</property>
        </product>
    </function>

    <function name="aero/force/Lift_mach_alpha">
       <description>Lift due to mach * alpha</description>
        <product>
          <property>aero/qbar-psf</property>
          <property>metrics/Sw-sqft</property>
          <sum>
            <product>
              <product>
                <value>0.638</value>
                <pow>
                  <property>velocities/mach</property>
                  <value>4</value>
                </pow>
              </product>
              <property>aero/alpha-20</property>
            </product>
            <product>
              <product>
                <value>-0.698</value>
                <pow>
                  <property>velocities/mach</property>
                  <value>2</value>
                </pow>
              </product>
              <property>aero/alpha-20</property>
            </product>
          </sum>
          <property>tune/lift/mach-alpha</property>
        </product>
    </function>

  </axis>

  <axis name="DRAG">

    <!-- CD0 is based on fuselage, wing, horizontal- en vertical tail -->
    <!-- Antennas, struts and wires are not taken into account        -->
    <!-- CD for gear (fixed and retractable) is defined below         -->
    <function name="aero/force/Drag_minimum">
       <description>Minimum drag</description>
       <product>
          <property>aero/qbar-psf</property>
          <property>metrics/Sw-sqft</property>
          <value> 0.03 </value>
          <property>tune/drag/minimum</property>
       </product>
    </function>

    <function name="aero/force/Drag_alpha">
       <description>Drag due to alpha</description>
       <product>
          <property>aero/qbar-psf</property>
          <property>metrics/Sw-sqft</property>
          <sum>
            <product>
              <value>0.171</value>
              <pow>
                <property>aero/alpha-20</property>
                <value>3</value>
              </pow>
            </product>
            <product>
              <value>0.168</value>
              <pow>
                <property>aero/alpha-20</property>
                <value>2</value>
              </pow>
            </product>
            <product>
              <value>-0.147</value>
              <property>aero/alpha-20</property>
            </product>
            <value>0.027</value> <!-- to prevent negative drag due to alpha -->
          </sum>
          <property>tune/drag/alpha</property>
       </product>
    </function>

    <function name="aero/force/Drag_induced">
       <description>Induced drag</description>
         <product>
           <property>aero/qbar-psf</property>
           <property>metrics/Sw-sqft</property>
           <property>aero/cl-squared</property>
           <value> 0.0895 </value>
          <property>tune/drag/induced</property>
         </product>
    </function>

    <function name="aero/force/Drag_mach">
       <description>Drag due to mach</description>
        <product>
          <property>aero/qbar-psf</property>
          <property>metrics/Sw-sqft</property>
          <sum>
            <product>
              <value>0.174</value>
              <pow>
                <property>velocities/mach</property>
                <value>4</value>
              </pow>
            </product>
            <product>
              <value>-0.116</value>
              <pow>
                <property>velocities/mach</property>
                <value>2</value>
              </pow>
            </product>
          </sum>
          <property>tune/drag/mach</property>
        </product>
    </function>

    <function name="aero/force/Drag_mach_alpha">
       <description>Drag due to mach * alpha</description>
        <product>
          <property>aero/qbar-psf</property>
          <property>metrics/Sw-sqft</property>
          <sum>
            <product>
              <product>
                <value>-0.596</value>
                <pow>
                  <property>velocities/mach</property>
                  <value>4</value>
                </pow>
              </product>
              <property>aero/alpha-20</property>
            </product>
            <product>
              <product>
                <value>0.649</value>
                <pow>
                  <property>velocities/mach</property>
                  <value>2</value>
                </pow>
              </product>
              <property>aero/alpha-20</property>
            </product>
          </sum>
          <property>tune/drag/mach-alpha</property>
        </product>
    </function>

    <function name="aero/force/Drag_beta">
       <description>Drag due to sideslip</description>
       <product>
          <property>aero/qbar-psf</property>
          <property>metrics/Sw-sqft</property>
          <table>
            <independentVar lookup="row">aero/beta-rad</independentVar>
            <tableData>
              -1.57    1.2300
              -0.26    0.0500
               0.00    0.0000
               0.26    0.0500
               1.57    1.2300
            </tableData>
          </table>
          <property>tune/drag/beta</property>
       </product>
    </function>

    <function name="aero/force/Drag_elevator">
       <description>Drag due to Elevator Deflection</description>
       <product>
           <property>aero/qbar-psf</property>
           <property>metrics/Sw-sqft</property>
           <abs><property>fcs/elevator-pos-rad</property></abs>
           <value> 0.0400 </value>
           <property>tune/drag/elevator</property>
       </product>
    </function>

    <function name="aero/force/Drag_gear">
       <description>Drag due to gear</description>
         <product>
           <property>aero/qbar-psf</property>
           <property>metrics/Sw-sqft</property>
           <property>gear/gear-pos-norm</property>
           <value> 0.0200 </value>
           <property>tune/drag/gear</property>
         </product>
    </function>

    <function name="aero/force/Drag_flap">
       <description>Drag due to flaps</description>
         <product>
           <property>aero/qbar-psf</property>
           <property>metrics/Sw-sqft</property>
           <property>fcs/flap-pos-deg</property>
           <value> 0.0023 </value>
           <property>tune/drag/flap</property>
         </product>
    </function>

    <function name="aero/force/Drag_speedbrake">
       <description>Drag due to speedbrakes</description>
         <product>
           <property>aero/qbar-psf</property>
           <property>metrics/Sw-sqft</property>
           <property>fcs/speedbrake-pos-norm</property>
           <value> 0.0600 </value>
           <property>tune/drag/speedbrake</property>
         </product>
    </function>

  </axis>

  <axis name="SIDE">

    <function name="aero/force/Side_beta">
       <description>Side force due to beta</description>
       <product>
           <property>aero/qbar-psf</property>
           <property>metrics/Sw-sqft</property>
           <property>aero/beta-rad</property>
           <value> -0.4477 </value>
           <property>tune/side/beta</property>
       </product>
    </function>

    <function name="aero/force/Side_roll_rate">
       <description>Side force due to roll rate</description>
       <product>
           <property>aero/qbar-psf</property>
           <property>metrics/Sw-sqft</property>
           <property>aero/bi2vel</property>
           <property>velocities/p-aero-rad_sec</property>
           <table>
             <independentVar lookup="row">aero/Re</independentVar>
             <tableData>
                 8639072   0.1617
                 9502980   0.0170
                12958609   0.0052
                17308920   0.0034
             </tableData>
           </table>
           <property>tune/side/roll_rate</property>
       </product>
    </function>

    <function name="aero/force/Side_yaw_rate">
       <description>Side force due to yaw rate</description>
       <product>
           <property>aero/qbar-psf</property>
           <property>metrics/Sw-sqft</property>
           <property>aero/bi2vel</property>
           <property>velocities/r-aero-rad_sec</property>
           <value> 0.3575 </value>
           <property>tune/side/yaw_rate</property>
       </product>
    </function>

    <function name="aero/force/Side_rudder">
       <description>Side force due to rudder</description>
       <product>
           <property>aero/qbar-psf</property>
           <property>metrics/Sw-sqft</property>
           <property>fcs/rudder-pos-rad</property>
           <value> 0.1673 </value>
           <property>tune/side/rudder</property>
       </product>
    </function>

  </axis>

  <axis name="PITCH">

    <function name="aero/moment/Pitch_alpha">
       <description>Pitch moment due to alpha</description>
       <product>
           <property>aero/qbar-psf</property>
           <property>metrics/Sw-sqft</property>
           <property>metrics/cbarw-ft</property>
           <sum>
            <product>
              <value>-0.197</value>
              <pow>
                <property>aero/alpha-20</property>
                <value>3</value>
              </pow>
            </product>
            <product>
              <value>0.133</value>
              <pow>
                <property>aero/alpha-20</property>
                <value>2</value>
              </pow>
            </product>
            <product>
              <value>-0.315</value>
              <property>aero/alpha-20</property>
            </product>
          </sum>
           <property>tune/pitch/alpha</property>
       </product>
    </function>

    <function name="aero/moment/Pitch_elevator">
       <description>Pitch moment due to elevator</description>
       <product>
          <property>aero/qbar-psf</property>
          <property>metrics/Sw-sqft</property>
          <property>metrics/cbarw-ft</property>
          <property>fcs/elevator-pos-rad</property>
          <table>
            <independentVar lookup="row">velocities/mach</independentVar>
            <tableData>
              0.0    -1.35
              2.0    -0.30
            </tableData>
          </table>
          <property>tune/pitch/elevator</property>
       </product>
    </function>

    <function name="aero/moment/Pitch_damp">
       <description>Pitch moment due to pitch rate</description>
       <product>
           <property>aero/qbar-psf</property>
           <property>metrics/Sw-sqft</property>
           <property>metrics/cbarw-ft</property>
           <property>aero/ci2vel</property>
           <property>velocities/q-aero-rad_sec</property>
           <value> -14.6753 </value>
           <property>tune/pitch/damp</property>
       </product>
    </function>

    <function name="aero/moment/Pitch_alphadot">
       <description>Pitch moment due to alpha rate</description>
       <product>
           <property>aero/qbar-psf</property>
           <property>metrics/Sw-sqft</property>
           <property>metrics/cbarw-ft</property>
           <property>aero/ci2vel</property>
           <property>aero/alphadot-rad_sec</property>
           <value> -5.1177 </value>
           <property>tune/pitch/alphadot</property>
       </product>
    </function>

    <function name="aero/moment/Pitch_mach">
       <description>Pitch due to mach</description>
        <product>
          <property>aero/qbar-psf</property>
          <property>metrics/Sw-sqft</property>
          <product>
            <value>0.053</value>
            <pow>
              <property>velocities/mach</property>
              <value>4</value>
            </pow>
          </product>
          <property>tune/pitch/mach</property>
        </product>
    </function>

    <function name="aero/moment/Pitch_mach_alpha">
       <description>Pitch due to mach * alpha</description>
        <product>
          <property>aero/qbar-psf</property>
          <property>metrics/Sw-sqft</property>
          <product>
            <product>
              <value>-0.169</value>
              <pow>
                <property>velocities/mach</property>
                <value>4</value>
              </pow>
            </product>
            <property>aero/alpha-20</property>
          </product>
          <property>tune/pitch/mach-alpha</property>
        </product>
    </function>

  </axis>

  <axis name="ROLL">

    <function name="aero/moment/Roll_beta">
       <description>Roll moment due to beta</description>
       <product>
           <property>aero/qbar-psf</property>
           <property>metrics/Sw-sqft</property>
           <property>metrics/bw-ft</property>
           <property>aero/beta-rad</property>
           <table>
             <independentVar lookup="row">aero/alpha-rad-corr</independentVar>
             <independentVar lookup="column">aero/Re</independentVar>
             <tableData>
                          8639072  9502980 12958609 17308920
                 -0.0349  -5.2275   -0.8332  -0.3613  -0.2100
                  0.3491  -14.9014  -1.4681  -0.5402  -0.3097
             </tableData>
           </table>
           <table>
             <independentVar lookup="row">velocities/mach</independentVar>
             <tableData>
                 0.0   0.001
                 0.2   0.15
                 0.3   0.4
                 1.0   1.0
             </tableData>
           </table>
           <property>tune/roll/beta</property>
       </product>
    </function>

    <function name="aero/moment/Roll_damp">
       <description>Roll moment due to roll rate</description>
       <product>
           <property>aero/qbar-psf</property>
           <property>metrics/Sw-sqft</property>
           <property>metrics/bw-ft</property>
           <property>aero/bi2vel</property>
           <property>velocities/p-aero-rad_sec</property>
           <value> -0.4770 </value>
           <property>tune/roll/damp</property>
       </product>
    </function>

    <!--<function name="aero/moment/Roll_yaw">
       <description>Roll moment due to yaw rate</description>
       <product>
           <property>aero/qbar-psf</property>
           <property>metrics/Sw-sqft</property>
           <property>metrics/bw-ft</property>
           <property>aero/bi2vel</property>
           <property>velocities/r-aero-rad_sec</property>
           <table>
             <independentVar lookup="row">aero/alpha-rad-corr</independentVar>
             <independentVar lookup="column">aero/Re</independentVar>
             <tableData>
                          8639072  9502980 12958609 17308920
                 -0.0349   0.2110   0.2110   0.2110   0.2110
                  0.3491  6.7876   0.9638   0.4138   0.3151
             </tableData>
           </table>
           <property>tune/roll/yaw</property>
       </product>
    </function>-->

    <function name="aero/moment/Roll_aileron">
       <description>Roll moment due to aileron</description>
       <product>
          <property>aero/qbar-psf</property>
          <property>metrics/Sw-sqft</property>
          <property>metrics/bw-ft</property>
          <property>fcs/left-aileron-pos-rad</property>
           <table>
            <independentVar lookup="row">velocities/mach</independentVar>
            <tableData>
              0.0    0.1100
              2.0    0.0275
            </tableData>
          </table>
          <property>tune/roll/aileron</property>
       </product>
    </function>

    <function name="aero/moment/Roll_rudder">
       <description>Roll moment due to rudder</description>
       <product>
           <property>aero/qbar-psf</property>
           <property>metrics/Sw-sqft</property>
           <property>metrics/bw-ft</property>
           <property>fcs/rudder-pos-rad</property>
           <value> 0.0100 </value>
           <property>tune/roll/rudder</property>
       </product>
    </function>

  </axis>

  <axis name="YAW">

    <!-- Stall initiator -->
    <function name="aero/moment/Yaw_alpha">
       <description>Yaw moment due to alpha</description>
       <product>
           <property>aero/qbar-psf</property>
           <property>metrics/Sw-sqft</property>
           <property>metrics/bw-ft</property>
           <property>aero/alpha-rad</property>
           <property>fcs/gear-no-wow</property>
           <table>
             <independentVar lookup="row">aero/beta-rad</independentVar>
             <independentVar lookup="column">aero/Re</independentVar>
             <tableData>
                          8639072  9502980
                 -0.3491  -1.0000   0.0000
                  0.3491   1.0000   0.0000
             </tableData>
           </table>
           <value>0.1674</value>
           <property>tune/yaw/alpha</property>
       </product>
    </function>

    <function name="aero/moment/Yaw_beta">
       <description>Yaw moment due to beta</description>
       <product>
           <property>aero/qbar-psf</property>
           <property>metrics/Sw-sqft</property>
           <property>metrics/bw-ft</property>
           <property>aero/beta-rad</property>
           <value> 0.0825 </value>
           <property>tune/yaw/beta</property>
       </product>
    </function>

    <function name="aero/moment/Yaw_roll_rate">
       <description>Yaw moment due to roll rate</description>
       <product>
           <property>aero/qbar-psf</property>
           <property>metrics/Sw-sqft</property>
           <property>metrics/bw-ft</property>
           <property>aero/bi2vel</property>
           <property>velocities/p-rad_sec</property>
           <table>
             <independentVar lookup="row">aero/Re</independentVar>
             <tableData>
                 8639072  -0.1308
                 9502980  -0.0445
                12958609  -0.0198
                17308920  -0.0111
             </tableData>
           </table>
           <property>tune/yaw/roll_rate</property>
       </product>
    </function>

    <function name="aero/moment/Yaw_damp">
       <description>Yaw moment due to yaw rate</description>
       <product>
           <property>aero/qbar-psf</property>
           <property>metrics/Sw-sqft</property>
           <property>metrics/bw-ft</property>
           <property>aero/bi2vel</property>
           <property>velocities/r-aero-rad_sec</property>
           <value> -0.4981 </value>
           <property>tune/yaw/damp</property>
       </product>
    </function>

    <function name="aero/moment/Yaw_rudder">
       <description>Yaw moment due to rudder</description>
       <product>
           <property>aero/qbar-psf</property>
           <property>metrics/Sw-sqft</property>
           <property>metrics/bw-ft</property>
           <property>fcs/rudder-pos-rad</property>
           <value> -0.02206 </value>
           <property>tune/yaw/rudder</property>
       </product>
    </function>

    <function name="aero/moment/Yaw_aileron">
       <description>Adverse yaw</description>
       <product>
           <property>aero/qbar-psf</property>
           <property>metrics/Sw-sqft</property>
           <property>metrics/bw-ft</property>
           <property>fcs/left-aileron-pos-rad</property>
           <value> 0.0000 </value>
           <property>tune/yaw/aileron</property>
       </product>
    </function>

  </axis>

 </aerodynamics>

 <external_reactions>

  <!-- countering the main engines thrust to redistribute it later -->

  <force name="propulsion/nullify" frame="BODY">
    <function>
      <product>
        <property>propulsion/engine[0]/thrust-lbs</property>
        <value>-1</value>
      </product>
    </function>
    <!-- location needs to be the same as the engine thruster -->
    <location unit="M">
     <x>     -0.2 </x>
     <y>     0.00 </y>
     <z>     0.485 </z>
    </location>
    <direction>
      <x>1</x>
      <y>0</y>
      <z>0</z>
    </direction>
  </force>

  <!-- the four main nozzles -->
  <!-- does not account for the RCS nozzles yet -->

  <force name="propulsion/front-left-vent" frame="BODY">
    <function>
      <quotient>
        <property>propulsion/engine[0]/thrust-lbs</property>
        <value>4</value>
      </quotient>
    </function>
    <!-- location needs to be the same as the engine thruster -->
    <location unit="M">
     <x> -1.40992 </x>
     <y> -1.06075 </y>
     <z>  0.44870 </z>
    </location>
    <direction>
      <x>1</x>
      <y>0</y>
      <z>0</z>
    </direction>
  </force>

  <force name="propulsion/front-right-vent" frame="BODY">
    <function>
      <quotient>
        <property>propulsion/engine[0]/thrust-lbs</property>
        <value>4</value>
      </quotient>
    </function>
    <!-- location needs to be the same as the engine thruster -->
    <location unit="M">
     <x> -1.40992 </x>
     <y>  1.06075 </y>
     <z>  0.44870 </z>
    </location>
    <direction>
      <x>1</x>
      <y>0</y>
      <z>0</z>
    </direction>
  </force>

  <force name="propulsion/rear-left-vent" frame="BODY">
    <function>
      <quotient>
        <property>propulsion/engine[0]/thrust-lbs</property>
        <value>4</value>
      </quotient>
    </function>
    <!-- location needs to be the same as the engine thruster -->
    <location unit="M">
     <x>  0.70349 </x>
     <y> -0.77735 </y>
     <z>  0.47649 </z>
    </location>
    <direction>
      <x>1</x>
      <y>0</y>
      <z>0</z>
    </direction>
  </force>

  <force name="propulsion/rear-right-vent" frame="BODY">
    <function>
      <quotient>
        <property>propulsion/engine[0]/thrust-lbs</property>
        <value>4</value>
      </quotient>
    </function>
    <!-- location needs to be the same as the engine thruster -->
    <location unit="M">
     <x>  0.70349 </x>
     <y>  0.77735 </y>
     <z>  0.47649 </z>
    </location>
    <direction>
      <x>1</x>
      <y>0</y>
      <z>0</z>
    </direction>
  </force>

  <!-- the 8 reaction control system nozzles -->

  <!-- pitch -->

  <force name="propulsion/pitch-front" frame="BODY">
    <function>
      <!-- if nozzle > 0.4/36 deg and elevator is negative, thrust = abs(elevator) * 1000, else thrust = 0 -->
      <ifthen>
        <and>
          <gt>
            <property>fcs/nozzle-pos-norm</property>
            <value>0.4</value>
          </gt>
          <lt>
            <property>fcs/elevator-cmd-norm</property>
            <value>0</value>
          </lt>
        </and>
        <product>
          <abs>
            <property>fcs/elevator-cmd-norm</property>
          </abs>
          <value>1000</value> <!-- this is the max thrust force -->
        </product>
        <value>0</value>
      </ifthen>
    </function>
    <!-- location needs to be the same as the engine thruster -->
    <location unit="M">
     <x> -7.07022 </x>
     <y>  0.00000 </y>
     <z> -0.06504 </z>
    </location>
    <direction>
      <x>0</x>
      <y>0</y>
      <z>-1</z>
    </direction>
  </force>

  <force name="propulsion/pitch-rear" frame="BODY">
    <function>
      <!-- if nozzle > 0.4/36 deg and elevator is positive, thrust = abs(elevator) * 1000, else thrust = 0 -->
      <ifthen>
        <and>
          <gt>
            <property>fcs/nozzle-pos-norm</property>
            <value>0.4</value>
          </gt>
          <gt>
            <property>fcs/elevator-cmd-norm</property>
            <value>0</value>
          </gt>
        </and>
        <product>
          <abs>
            <property>fcs/elevator-cmd-norm</property>
          </abs>
          <value>1000</value> <!-- this is the max thrust force -->
        </product>
        <value>0</value>
      </ifthen>
    </function>
    <!-- location needs to be the same as the engine thruster -->
    <location unit="M">
     <x>  6.82453 </x>
     <y>  0.00000 </y>
     <z>  1.05262 </z>
    </location>
    <direction>
      <x>0</x>
      <y>0</y>
      <z>-1</z>
    </direction>
  </force>

  <!-- yaw -->

  <force name="propulsion/yaw-left" frame="BODY">
    <function>
      <!-- if nozzle > 0.4/36 deg and rudder is negative, thrust = abs(elevator) * 1000, else thrust = 0 -->
      <ifthen>
        <and>
          <gt>
            <property>fcs/nozzle-pos-norm</property>
            <value>0.4</value>
          </gt>
          <lt>
            <property>fcs/rudder-cmd-norm</property>
            <value>0</value>
          </lt>
        </and>
        <product>
          <abs>
            <property>fcs/rudder-cmd-norm</property>
          </abs>
          <value>1000</value> <!-- this is the max thrust force -->
        </product>
        <value>0</value>
      </ifthen>
    </function>
    <!-- location needs to be the same as the engine thruster -->
    <location unit="M">
     <x>  6.80444 </x>
     <y> -0.15463 </y>
     <z>  1.24735 </z>
    </location>
    <direction>
      <x>0</x>
      <y>-1</y>
      <z>0</z>
    </direction>
  </force>

  <force name="propulsion/yaw-right" frame="BODY">
    <function>
      <!-- if nozzle > 0.4/36 deg and rudder is negative, thrust = abs(elevator) * 1000, else thrust = 0 -->
      <ifthen>
        <and>
          <gt>
            <property>fcs/nozzle-pos-norm</property>
            <value>0.4</value>
          </gt>
          <gt>
            <property>fcs/rudder-cmd-norm</property>
            <value>0</value>
          </gt>
        </and>
        <product>
          <abs>
            <property>fcs/rudder-cmd-norm</property>
          </abs>
          <value>1000</value> <!-- this is the max thrust force -->
        </product>
        <value>0</value>
      </ifthen>
    </function>
    <!-- location needs to be the same as the engine thruster -->
    <location unit="M">
     <x>  6.80444 </x>
     <y>  0.15463 </y>
     <z>  1.24735 </z>
    </location>
    <direction>
      <x>0</x>
      <y>1</y>
      <z>0</z>
    </direction>
  </force>

  <!-- roll -->

  <!-- roll left -->

  <force name="propulsion/roll-left-top" frame="BODY">
    <function>
      <!-- if nozzle > 0.4/36 deg and aileron is positive, thrust = abs(elevator) * 1000, else thrust = 0 -->
      <ifthen>
        <and>
          <gt>
            <property>fcs/nozzle-pos-norm</property>
            <value>0.4</value>
          </gt>
          <lt>
            <property>fcs/aileron-cmd-norm</property>
            <value>0</value>
          </lt>
        </and>
        <product>
          <abs>
            <property>fcs/aileron-cmd-norm</property>
          </abs>
          <value>500</value> <!-- this is the max thrust force -->
        </product>
        <value>0</value>
      </ifthen>
    </function>
    <!-- location needs to be the same as the engine thruster -->
    <location unit="M">
     <x>  1.96449 </x>
     <y> -4.57522 </y>
     <z>  0.30817 </z>
    </location>
    <direction>
      <x>0</x>
      <y>0</y>
      <z>1</z>
    </direction>
  </force>

  <force name="propulsion/roll-right-bottom" frame="BODY">
    <function>
      <!-- if nozzle > 0.4/36 deg and aileron is positive, thrust = abs(elevator) * 1000, else thrust = 0 -->
      <ifthen>
        <and>
          <gt>
            <property>fcs/nozzle-pos-norm</property>
            <value>0.4</value>
          </gt>
          <lt>
            <property>fcs/aileron-cmd-norm</property>
            <value>0</value>
          </lt>
        </and>
        <product>
          <abs>
            <property>fcs/aileron-cmd-norm</property>
          </abs>
          <value>500</value> <!-- this is the max thrust force -->
        </product>
        <value>0</value>
      </ifthen>
    </function>
    <!-- location needs to be the same as the engine thruster -->
    <location unit="M">
     <x>  1.96449 </x>
     <y>  4.57522 </y>
     <z>  0.27047 </z>
    </location>
    <direction>
      <x>0</x>
      <y>0</y>
      <z>-1</z>
    </direction>
  </force>

  <!-- roll right -->

  <force name="propulsion/roll-right-top" frame="BODY">
    <function>
      <!-- if nozzle > 0.4/36 deg and aileron is negative, thrust = abs(elevator) * 1000, else thrust = 0 -->
      <ifthen>
        <and>
          <gt>
            <property>fcs/nozzle-pos-norm</property>
            <value>0.4</value>
          </gt>
          <gt>
            <property>fcs/aileron-cmd-norm</property>
            <value>0</value>
          </gt>
        </and>
        <product>
          <abs>
            <property>fcs/aileron-cmd-norm</property>
          </abs>
          <value>500</value> <!-- this is the max thrust force -->
        </product>
        <value>0</value>
      </ifthen>
    </function>
    <!-- location needs to be the same as the engine thruster -->
    <location unit="M">
     <x>  1.96449 </x>
     <y>  4.57522 </y>
     <z>  0.30817 </z>
    </location>
    <direction>
      <x>0</x>
      <y>0</y>
      <z>1</z>
    </direction>
  </force>

  <force name="propulsion/roll-left-bottom" frame="BODY">
    <function>
      <!-- if nozzle > 0.4/36 deg and aileron is positive, thrust = abs(elevator) * 1000, else thrust = 0 -->
      <ifthen>
        <and>
          <gt>
            <property>fcs/nozzle-pos-norm</property>
            <value>0.4</value>
          </gt>
          <gt>
            <property>fcs/aileron-cmd-norm</property>
            <value>0</value>
          </gt>
        </and>
        <product>
          <abs>
            <property>fcs/aileron-cmd-norm</property>
          </abs>
          <value>500</value> <!-- this is the max thrust force -->
        </product>
        <value>0</value>
      </ifthen>
    </function>
    <!-- location needs to be the same as the engine thruster -->
    <location unit="M">
     <x>  1.96449 </x>
     <y> -4.57522 </y>
     <z>  0.27047 </z>
    </location>
    <direction>
      <x>0</x>
      <y>0</y>
      <z>-1</z>
    </direction>
  </force>

 </external_reactions>

</fdm_config>
