<?xml version="1.0"?>

<!--
  File:     F402-RR-408.xml
  Author:   AeromatiC++ v 3.3.10

  See: http://wiki.flightgear.org/JSBSim_Engines#FGTurbine

  Inputs:
    name:                    F402-RR-408
    type:                    Turbine Engine
    thrust:                  23604.9 lbf
    bypass ratio:            1.000:1
    overall pressure ratio:  16.3:1
    augmented?               no
    injected?                yes

  Outputs
    tsfc:                    0.8
    engine weight:           4519.6 lbs
    engine length:           9.9 ft
    engine diameter:         5.8 ft
-->

<turbine_engine name="F402-RR-408">
  <milthrust> 23604.9 </milthrust>
  <bypassratio>     1.000 </bypassratio>
  <tsfc>            0.752 </tsfc>
  <bleed>           0.03</bleed>
  <idlen1>         30.0 </idlen1>
  <idlen2>         60.0 </idlen2>
  <maxn1>         100.0 </maxn1>
  <maxn2>         100.0 </maxn2>
  <augmented>         0 </augmented>
  <injected>          1 </injected>

  <function name="IdleThrust">
   <table>
    <independentVar lookup="row">velocities/mach</independentVar>
    <independentVar lookup="column">atmosphere/density-altitude</independentVar>
    <tableData>
         -10000     0     10000   20000   30000   40000   50000   90000
     0.0  0.0430  0.0488  0.0528  0.0694  0.0899  0.1183  0.1467  0
     0.2  0.0500  0.0501  0.0335  0.0544  0.0797  0.1049  0.1342  0
     0.4  0.0040  0.0047  0.0020  0.0272  0.0595  0.0891  0.1203  0
     0.6 -0.0804 -0.0804 -0.0560 -0.0237  0.0276  0.0718  0.1073  0
     0.8 -0.2129 -0.2129 -0.1498 -0.1025  0.0474  0.0868  0.0900  0
     1.0 -0.2839 -0.2839 -0.1104 -0.0469 -0.0270  0.0552  0.0800  0
    </tableData>
   </table>
  </function>

  <function name="MilThrust">
   <table>
    <independentVar lookup="row">velocities/mach</independentVar>
    <independentVar lookup="column">atmosphere/density-altitude</independentVar>
    <tableData>
          -10000       0   10000   20000   30000   40000   50000   60000   90000
      0.0  1.2600  1.0000  0.7400  0.5340  0.3720  0.2410  0.1490  0.0580  0
      0.2  1.1452  0.9135  0.6817  0.4949  0.3472  0.2259  0.1399  0.0391  0
      0.4  1.0994  0.8805  0.6616  0.4837  0.3413  0.2227  0.1386  0.0411  0
      0.6  1.1031  0.8882  0.6734  0.4969  0.3531  0.2316  0.1438  0.0439  0
      0.8  1.1473  0.9302  0.7132  0.5308  0.3803  0.2508  0.1550  0.0483  0
      1.0  1.2184  0.9968  0.7752  0.5794  0.4227  0.2803  0.1735  0.0561  0
      1.2  1.2890  1.0676  0.8463  0.6458  0.4731  0.3160  0.1953  0.0642  0
      1.4  1.3486  1.1336  0.9188  0.7149  0.5313  0.3587  0.2225  0.0761  0
    </tableData>
   </table>
  </function>

  <function name="Injection">
   <table>
    <independentVar lookup="row">velocities/mach</independentVar>
    <independentVar lookup="column">atmosphere/density-altitude</independentVar>
    <tableData>
            0       50000
     0.0    1.2000  1.2000
     1.0    1.2000  1.2000
    </tableData>
   </table>
  </function>

</turbine_engine>
